*Heading
** Job name: Try_New_2 Model name: Model-3
** Generated by: Abaqus/CAE 2022
*Preprint, echo=NO, model=NO, history=NO, contact=NO
**
** PARTS
**
*Part, name=Part-1
*Node
      1,           0.,           0.,           0.
      2,          6.5,           0.,           0.
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*Element, type=S4R
  1,   1,   2,  13,  12
  2,   2,   3,  14,  13
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*Nset, nset=Set-2, generate
   1,  121,    1
*Elset, elset=Set-2, generate
   1,  100,    1
** Section: Paper_Shell
*Shell Section, elset=Set-2, material=Paper_Material
0.3, 5
*End Part
**
*Part, name=Part-2
*Node
      1,           0.,           0.,           0.
      2,          6.5,           0.,           0.
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*Element, type=S4R
  1,   1,   2,  13,  12
  2,   2,   3,  14,  13
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*Nset, nset=Set-2, generate
   1,  121,    1
*Elset, elset=Set-2, generate
   1,  100,    1
** Section: Paper_Shell
*Shell Section, elset=Set-2, material=Paper_Material
0.3, 5
*End Part
**
**
** ASSEMBLY
**
*Assembly, name=Assembly
**
*Instance, name=Part-1-1, part=Part-1
*End Instance
**
*Instance, name=Part-2-1, part=Part-2
         65.,           0.,           0.
*End Instance
**
*Node
      1,          65.,           0.,           0.
*Node
      2,          65.,          65.,           0.
*Element, type=CONN3D2
1, 1, 2
*Connector Section, elset=Wire-1-Set-1
Hinge,
"Datum csys-2", "Datum csys-3"
*Nset, nset=Plate_1, instance=Part-1-1, generate
   1,  121,    1
*Elset, elset=Plate_1, instance=Part-1-1, generate
   1,  100,    1
*Nset, nset=RF_Set
 1,
*Nset, nset=Set-4, instance=Part-1-1, generate
   1,  111,   11
*Elset, elset=Set-4, instance=Part-1-1, generate
  1,  91,  10
*Nset, nset=Set-5
 2,
*Nset, nset=Set-6
 2,
*Nset, nset=Set-7
 1,
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*Elset, elset=Set-11, instance=Part-1-1, generate
  10,  100,   10
*Nset, nset=Set-12, instance=Part-1-1, generate
   1,  121,    1
*Elset, elset=Set-12, instance=Part-1-1, generate
   1,  100,    1
*Nset, nset=Set-13, instance=Part-2-1, generate
  11,  121,   11
*Elset, elset=Set-13, instance=Part-2-1, generate
  10,  100,   10
*Nset, nset=Set-16, instance=Part-2-1
  11, 121
*Nset, nset=Set-17, instance=Part-2-1, generate
  11,  121,   11
*Elset, elset=Set-17, instance=Part-2-1, generate
  10,  100,   10
*Nset, nset=Set-18
 1, 2
*Nset, nset=Wire-1-Set-1
 1, 2
*Elset, elset=Wire-1-Set-1
 1,
*Nset, nset=m_Set-14
 1,
*Nset, nset=m_Set-19, instance=Part-1-1, generate
   1,  121,    1
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*Nset, nset=s_Set-19, instance=Part-1-1, generate
  11,  121,   11
*Elset, elset=s_Set-19, instance=Part-1-1, generate
  10,  100,   10
*Surface, type=NODE, name=m_Set-19_CNS_, internal
m_Set-19, 1.
*Surface, type=NODE, name=s_Set-19_CNS_, internal
s_Set-19, 1.
*Orientation, name="Datum csys-2"
          0.,           1.,           0.,          -1.,           0.,           0.
1, 0.
*Orientation, name="Datum csys-3"
          0.,          -1.,           0.,          -1.,           0.,           0.
1, 0.
** Constraint: Constraint-3
*Tie, name=Constraint-3, adjust=yes, no rotation
s_Set-19_CNS_, m_Set-19_CNS_
*End Assembly
*Amplitude, name=Amp-1, definition=SMOOTH STEP
             0.,              0.,              1.,              1.
**
** MATERIALS
**
*Material, name=Paper_Material
*Density
 8e-10,
*Elastic
2000., 0.3
**
** BOUNDARY CONDITIONS
**
** Name: BC-3 Type: Displacement/Rotation
*Boundary
Set-12, 1, 1
Set-12, 2, 2
Set-12, 3, 3
** ----------------------------------------------------------------
**
** STEP: Step-1
**
*Step, name=Step-1, nlgeom=YES
*Dynamic, Explicit
, 1.
*Bulk Viscosity
0.06, 1.2
**
** BOUNDARY CONDITIONS
**
** Name: BC-2 Type: Displacement/Rotation
*Boundary, amplitude=Amp-1
Set-17, 3, 3, -5.
** Name: BC-4 Type: Symmetry/Antisymmetry/Encastre
*Boundary
Set-18, ENCASTRE
**
** OUTPUT REQUESTS
**
*Restart, write, number interval=1, time marks=NO
**
** FIELD OUTPUT: F-Output-1
**
*Output, field, variable=PRESELECT
**
** HISTORY OUTPUT: H-Output-1
**
*Output, history, variable=PRESELECT
*End Step
