*Heading
** Job name: Box_Try_2 Model name: Box
** Generated by: Abaqus/CAE 2022
*Preprint, echo=NO, model=NO, history=NO, contact=NO
**
** PARTS
**
*Part, name=Part-1
*Node
      1,           0.,           0.,           0.
      2,          6.5,           0.,           0.
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*Element, type=S4R
  1,   1,   2,  13,  12
  2,   2,   3,  14,  13
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*Nset, nset=Set-2, generate
   1,  121,    1
*Elset, elset=Set-2, generate
   1,  100,    1
** Section: Paper_Shell
*Shell Section, elset=Set-2, material=Paper_Material
0.3, 5
*End Part
**
*Part, name=Part-2
*Node
      1,           0.,           0.,           0.
      2,          6.5,           0.,           0.
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*Element, type=S4R
  1,   1,   2,  13,  12
  2,   2,   3,  14,  13
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*Nset, nset=Set-2, generate
   1,  121,    1
*Elset, elset=Set-2, generate
   1,  100,    1
** Section: Paper_Shell
*Shell Section, elset=Set-2, material=Paper_Material
0.3, 5
*End Part
**
**
** ASSEMBLY
**
*Assembly, name=Assembly
**
*Instance, name=Part-1-1, part=Part-1
19.0380592228744,           0., 45.9619407771256
19.0380592228744,           0., 45.9619407771256, 19.0380592228744, 1.0000000139546, 45.9619407771256, 45.0000000171299
*End Instance
**
*Instance, name=Part-2-1, part=Part-2
         65.,           0.,           0.
         65.,           0.,           0.,          65., -1.0000000139546,           0., 45.0000000171299
*End Instance
**
*Instance, name=Part-1-2, part=Part-1
   19.038059,           0.,    45.961941
   19.038059,           0.,    45.961941,    19.038059, -1.0000000139546,    45.961941, 45.0000000171299
*End Instance
**
*Instance, name=Part-1-3, part=Part-1
  110.961941,           0.,    45.961941
  110.961941,           0.,    45.961941,   110.961941, 0.999999990362471,    45.961941, 225.000000192033
*End Instance
**
*Nset, nset=Hinge-1-1, instance=Part-1-1, generate
   1,  111,   11
*Elset, elset=Hinge-1-1, instance=Part-1-1, generate
  1,  91,  10
*Nset, nset=Hinge-1-2, instance=Part-1-2, generate
   1,  111,   11
*Elset, elset=Hinge-1-2, instance=Part-1-2, generate
  1,  91,  10
*Nset, nset=Hinge-2-1, instance=Part-1-1, generate
  11,  121,   11
*Elset, elset=Hinge-2-1, instance=Part-1-1, generate
  10,  100,   10
*Nset, nset=Hinge-2-3, instance=Part-2-1, generate
   1,  111,   11
*Elset, elset=Hinge-2-3, instance=Part-2-1, generate
  1,  91,  10
*Nset, nset=Hinge-3-2, instance=Part-1-2, generate
  11,  121,   11
*Elset, elset=Hinge-3-2, instance=Part-1-2, generate
  10,  100,   10
*Nset, nset=Hinge-3-4, instance=Part-1-3, generate
  11,  121,   11
*Elset, elset=Hinge-3-4, instance=Part-1-3, generate
  10,  100,   10
*Nset, nset=Hinge-4-3, instance=Part-2-1, generate
  11,  121,   11
*Elset, elset=Hinge-4-3, instance=Part-2-1, generate
  10,  100,   10
*Nset, nset=Hinge-4-4, instance=Part-1-3, generate
   1,  111,   11
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*Nset, nset=Set-25, instance=Part-2-1, generate
   1,  111,   11
*Elset, elset=Set-25, instance=Part-2-1, generate
  1,  91,  10
*Nset, nset=Set-26, instance=Part-1-3, generate
  11,  121,   11
*Elset, elset=Set-26, instance=Part-1-3, generate
  10,  100,   10
*Surface, type=NODE, name=Hinge-1-1_CNS_, internal
Hinge-1-1, 1.
*Surface, type=NODE, name=Hinge-1-2_CNS_, internal
Hinge-1-2, 1.
*Surface, type=NODE, name=Hinge-2-1_CNS_, internal
Hinge-2-1, 1.
*Surface, type=NODE, name=Hinge-2-3_CNS_, internal
Hinge-2-3, 1.
*Surface, type=NODE, name=Hinge-3-2_CNS_, internal
Hinge-3-2, 1.
*Surface, type=NODE, name=Hinge-3-4_CNS_, internal
Hinge-3-4, 1.
*Surface, type=NODE, name=Hinge-4-3_CNS_, internal
Hinge-4-3, 1.
*Surface, type=NODE, name=Hinge-4-4_CNS_, internal
Hinge-4-4, 1.
** Constraint: Hinge1
*Tie, name=Hinge1, adjust=yes, no rotation
Hinge-1-2_CNS_, Hinge-1-1_CNS_
** Constraint: Hinge2
*Tie, name=Hinge2, adjust=yes, no rotation
Hinge-2-3_CNS_, Hinge-2-1_CNS_
** Constraint: Hinge3
*Tie, name=Hinge3, adjust=yes, no rotation
Hinge-3-4_CNS_, Hinge-3-2_CNS_
** Constraint: Hinge4
*Tie, name=Hinge4, adjust=yes, no rotation
Hinge-4-4_CNS_, Hinge-4-3_CNS_
*End Assembly
*Amplitude, name=Amp-1, definition=SMOOTH STEP
             0.,              0.,              1.,              1.
**
** MATERIALS
**
*Material, name=Paper_Material
*Density
 8e-10,
*Elastic
2000., 0.3
**
** BOUNDARY CONDITIONS
**
** Name: BC-1 Type: Displacement/Rotation
*Boundary
Set-25, 1, 1
Set-25, 2, 2
Set-25, 3, 3
** ----------------------------------------------------------------
**
** STEP: Step-1
**
*Step, name=Step-1, nlgeom=YES
*Dynamic, Explicit
, 1.
*Bulk Viscosity
0.06, 1.2
**
** BOUNDARY CONDITIONS
**
** Name: BC-2 Type: Displacement/Rotation
*Boundary, amplitude=Amp-1
Set-26, 3, 3, -50.
**
** OUTPUT REQUESTS
**
*Restart, write, number interval=1, time marks=NO
**
** FIELD OUTPUT: F-Output-1
**
*Output, field, variable=PRESELECT
**
** HISTORY OUTPUT: H-Output-1
**
*Output, history, variable=PRESELECT
*End Step
