*Heading
** Job name: Job-1 Model name: Model-1
** Generated by: Abaqus/CAE 2022
*Preprint, echo=NO, model=NO, history=NO, contact=NO
**
** PARTS
**
*Part, name=Part-1
*Node
      1,           0.,           0.,           0.
      2,          6.5,           0.,           0.
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*Element, type=S4R
  1,   1,   2,  13,  12
  2,   2,   3,  14,  13
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*Nset, nset=Set-2, generate
   1,  121,    1
*Elset, elset=Set-2, generate
   1,  100,    1
** Section: Paper_Shell
*Shell Section, elset=Set-2, material=Paper_Material
0.3, 5
*End Part
**
*Part, name=Part-2
*Node
      1,           0.,           0.,           0.
      2,          6.5,           0.,           0.
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*Element, type=S4R
  1,   1,   2,  13,  12
  2,   2,   3,  14,  13
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*Nset, nset=Set-2, generate
   1,  121,    1
*Elset, elset=Set-2, generate
   1,  100,    1
** Section: Paper_Shell
*Shell Section, elset=Set-2, material=Paper_Material
0.3, 5
*End Part
**
**
** ASSEMBLY
**
*Assembly, name=Assembly
**
*Instance, name=Part-1-1, part=Part-1
19.0380592228744,           0., 45.9619407771256
19.0380592228744,           0., 45.9619407771256, 19.0380592228744, 1.0000000139546, 45.9619407771256, 45.0000000171299
*End Instance
**
*Instance, name=Part-2-1, part=Part-2
         65.,           0.,           0.
         65.,           0.,           0.,          65., -1.0000000139546,           0., 45.0000000171299
*End Instance
**
*Node
      1,          65.,           0.,           0.
*Node
      2,          65.,          65.,           0.
*Element, type=CONN3D2
1, 1, 2
*Connector Section, elset=Wire-1-Set-1, behavior=Hinge_connect
Hinge,
"Datum csys-2",
*Nset, nset=Hige_1-1, instance=Part-2-1, generate
   1,  111,   11
*Elset, elset=Hige_1-1, instance=Part-2-1, generate
  1,  91,  10
*Nset, nset=Hinge_1, instance=Part-1-1, generate
  11,  121,   11
*Elset, elset=Hinge_1, instance=Part-1-1, generate
  10,  100,   10
*Nset, nset=Plate_1, instance=Part-1-1, generate
   1,  121,    1
*Elset, elset=Plate_1, instance=Part-1-1, generate
   1,  100,    1
*Nset, nset=RF_Set
 1,
*Nset, nset=Set-4, instance=Part-1-1, generate
   1,  111,   11
*Elset, elset=Set-4, instance=Part-1-1, generate
  1,  91,  10
*Nset, nset=Set-5
 2,
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*Elset, elset=Set-11, instance=Part-1-1, generate
  10,  100,   10
*Nset, nset=Set-18, instance=Part-2-1, generate
   1,  111,   11
*Elset, elset=Set-18, instance=Part-2-1, generate
  1,  91,  10
*Nset, nset=Set-20, instance=Part-1-1, generate
   1,  111,   11
*Elset, elset=Set-20, instance=Part-1-1, generate
  1,  91,  10
*Nset, nset=Set-23
 1, 2
*Nset, nset=Set-24, instance=Part-1-1, generate
   1,  111,   11
*Elset, elset=Set-24, instance=Part-1-1, generate
  1,  91,  10
*Nset, nset=Wire-1-Set-1
 1, 2
*Elset, elset=Wire-1-Set-1
 1,
*Surface, type=NODE, name=Hige_1-1_CNS_, internal
Hige_1-1, 1.
*Surface, type=NODE, name=Hinge_1_CNS_, internal
Hinge_1, 1.
*Orientation, name="Datum csys-2"
          0.,           1.,           0., -0.707106781186548,           0., 0.707106781186547
1, 0.
** Constraint: Constraint-1
*Tie, name=Constraint-1, adjust=yes, no rotation
Hinge_1_CNS_, Hige_1-1_CNS_
*End Assembly
*Connector Behavior, name=Hinge_connect
*Connector Friction, predefined
0.,0.,0.,0.
*Friction
 0.01,
*Amplitude, name=Amp-1, definition=SMOOTH STEP
             0.,              0.,              1.,              1.
*Amplitude, name=Amp-2, definition=EQUALLY SPACED, fixed interval=5.
             0.,              1.
**
** MATERIALS
**
*Material, name=Paper_Material
*Density
 8e-10,
*Elastic
2000., 0.3
**
** BOUNDARY CONDITIONS
**
** Name: BC-2 Type: Symmetry/Antisymmetry/Encastre
*Boundary
Set-23, ENCASTRE
** Name: BC-3 Type: Displacement/Rotation
*Boundary
Set-18, 1, 1
Set-18, 2, 2
Set-18, 3, 3
** ----------------------------------------------------------------
**
** STEP: Step-1
**
*Step, name=Step-1, nlgeom=YES
*Dynamic, Explicit
, 1.
*Bulk Viscosity
0.06, 1.2
**
** BOUNDARY CONDITIONS
**
** Name: BC-4 Type: Displacement/Rotation
*Boundary, amplitude=Amp-2
Set-24, 3, 3, -25.
**
** OUTPUT REQUESTS
**
*Restart, write, number interval=1, time marks=NO
**
** FIELD OUTPUT: F-Output-1
**
*Output, field, variable=PRESELECT
**
** HISTORY OUTPUT: H-Output-1
**
*Output, history, variable=PRESELECT
*End Step
