*Heading
** Job name: Explicit_Compressed_5_deg_U1_const Model name: Box_Explicit_Compressed
** Generated by: Abaqus/CAE 2022
*Preprint, echo=NO, model=NO, history=NO, contact=NO
**
** PARTS
**
*Part, name=Part-1
*Node
      1,         32.5,         32.5,           0.
      2,         32.5,          65.,           0.
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*Element, type=S4
 1,  1, 10, 58, 25
 2, 10, 11, 59, 58
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*Nset, nset=Set-2, generate
   1,  121,    1
*Elset, elset=Set-2, generate
   1,  100,    1
** Section: Paper_Shell
*Shell Section, elset=Set-2, material=Paper_Material
0.6, 5
*End Part
**
*Part, name=Part-2
*Node
      1,         32.5,         32.5,           0.
      2,         32.5,          65.,           0.
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*Element, type=S4R
 1,  1, 10, 58, 25
 2, 10, 11, 59, 58
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*Nset, nset=Set-2, generate
   1,  121,    1
*Elset, elset=Set-2, generate
   1,  100,    1
** Section: Paper_Shell
*Shell Section, elset=Set-2, material=Paper_Material
0.6, 5
*End Part
**
*Part, name=Part-3
*End Part
**
**
** ASSEMBLY
**
*Assembly, name=Assembly
**
*Instance, name=Part-1-1, part=Part-1
0.247344624036551,           0., 4.66512327859779
0.247344624036551,           0., 4.66512327859779, 0.247344624036551, 0.999999995794047, 4.66512327859779, 4.9999999049771
*End Instance
**
*Instance, name=Part-2-1, part=Part-2
         65.,           0.,          -1.
         65.,           0.,          -1.,          65., -0.999999995794047,          -1., 4.9999999049771
*End Instance
**
*Instance, name=Part-1-2, part=Part-1
0.247344310043935,           0., 4.66512369393142
0.247344310043935,           0., 4.66512369393142, 0.247344310043935, -0.999999995794047, 4.66512369393142, 4.9999999049771
*End Instance
**
*Instance, name=Part-1-3, part=Part-1
129.752655689956,           0., 4.66512369393142
129.752655689956,           0., 4.66512369393142, 129.752655689956, 1.00000000590658, 4.66512369393142, 184.999999913469
*End Instance
**
*Instance, name=Part-3-1, part=Part-3
        -35.,        -67.5,          -1.
*Node
      1,           0.,           0.,           0.
      2,          20.,           0.,           0.
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*Element, type=R3D4
  1,   1,   2,  13,  12
  2,   2,   3,  14,  13
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*Node
    122,           0.,           0.,           0.
*Nset, nset=Part-3-1-RefPt_, internal
122,
*Elset, elset=Part-3-1, generate
   1,  100,    1
*End Instance
**
*Element, type=CONN3D2
1, Part-1-3.4, Part-1-2.4
*Connector Section, elset=Wire-1-Set-3, behavior=ConnSect-2
Axial,
"Datum csys-2",
*Nset, nset=Hinge-1-1, instance=Part-2-1
  3,  4,  8, 18, 19, 20, 21, 42, 43, 44, 45
*Elset, elset=Hinge-1-1, instance=Part-2-1
 21, 22, 23, 24, 25, 71, 72, 73, 74, 75
*Nset, nset=Hinge-1-2, instance=Part-1-1
  5,  6,  9, 30, 31, 32, 33, 54, 55, 56, 57
*Elset, elset=Hinge-1-2, instance=Part-1-1
  46,  47,  48,  49,  50,  96,  97,  98,  99, 100
*Nset, nset=Hinge-2-1, instance=Part-2-1
  5,  6,  9, 30, 31, 32, 33, 54, 55, 56, 57
*Elset, elset=Hinge-2-1, instance=Part-2-1
  46,  47,  48,  49,  50,  96,  97,  98,  99, 100
*Nset, nset=Hinge-2-3, instance=Part-1-3
  3,  4,  8, 18, 19, 20, 21, 42, 43, 44, 45
*Elset, elset=Hinge-2-3, instance=Part-1-3
 21, 22, 23, 24, 25, 71, 72, 73, 74, 75
*Nset, nset=Hinge-3-2, instance=Part-1-1
  3,  4,  8, 18, 19, 20, 21, 42, 43, 44, 45
*Elset, elset=Hinge-3-2, instance=Part-1-1
 21, 22, 23, 24, 25, 71, 72, 73, 74, 75
*Nset, nset=Hinge-3-4, instance=Part-1-2
  3,  4,  8, 18, 19, 20, 21, 42, 43, 44, 45
*Elset, elset=Hinge-3-4, instance=Part-1-2
 21, 22, 23, 24, 25, 71, 72, 73, 74, 75
*Nset, nset=Hinge-4-3, instance=Part-1-3
  5,  6,  9, 30, 31, 32, 33, 54, 55, 56, 57
*Elset, elset=Hinge-4-3, instance=Part-1-3
  46,  47,  48,  49,  50,  96,  97,  98,  99, 100
*Nset, nset=Hinge-4-4, instance=Part-1-2
  5,  6,  9, 30, 31, 32, 33, 54, 55, 56, 57
*Elset, elset=Hinge-4-4, instance=Part-1-2
  46,  47,  48,  49,  50,  96,  97,  98,  99, 100
*Nset, nset=Set-42, instance=Part-3-1, generate
   1,  121,    1
*Elset, elset=Set-42, instance=Part-3-1, generate
   1,  100,    1
*Nset, nset=Set-45, instance=Part-3-1
 122,
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*Elset, elset=Wire-1-Set-3
 1,
*Surface, type=NODE, name=Hinge-1-1_CNS_, internal
Hinge-1-1, 1.
*Surface, type=NODE, name=Hinge-1-2_CNS_, internal
Hinge-1-2, 1.
*Surface, type=NODE, name=Hinge-2-1_CNS_, internal
Hinge-2-1, 1.
*Surface, type=NODE, name=Hinge-2-3_CNS_, internal
Hinge-2-3, 1.
*Surface, type=NODE, name=Hinge-3-2_CNS_, internal
Hinge-3-2, 1.
*Surface, type=NODE, name=Hinge-3-4_CNS_, internal
Hinge-3-4, 1.
*Surface, type=NODE, name=Hinge-4-3_CNS_, internal
Hinge-4-3, 1.
*Surface, type=NODE, name=Hinge-4-4_CNS_, internal
Hinge-4-4, 1.
*Rigid Body, ref node=Part-3-1.Part-3-1-RefPt_, elset=Part-3-1.Part-3-1
*Orientation, name="Datum csys-2"
         -1.,           0.,           0.,           0.,           1.,           0.
1, 0.
** Constraint: Hinge1
*Tie, name=Hinge1, adjust=yes, no rotation
Hinge-1-2_CNS_, Hinge-1-1_CNS_
** Constraint: Hinge2
*Tie, name=Hinge2, adjust=yes, no rotation
Hinge-2-3_CNS_, Hinge-2-1_CNS_
** Constraint: Hinge3
*Tie, name=Hinge3, adjust=yes, no rotation
Hinge-3-4_CNS_, Hinge-3-2_CNS_
** Constraint: Hinge4
*Tie, name=Hinge4, adjust=yes, no rotation
Hinge-4-4_CNS_, Hinge-4-3_CNS_
*End Assembly
*Connector Behavior, name=ConnSect-2
*Connector Constitutive Reference
91.92, , , , ,
*Connector Elasticity, component=1
 0.7871,
*Amplitude, name=Amp-1, definition=SMOOTH STEP
             0.,              0.,              1.,              1.
*Amplitude, name=Amp-2, definition=EQUALLY SPACED, fixed interval=1.
             0.,              1.
**
** MATERIALS
**
*Material, name=Paper_Material
*Density
 8e-10,
*Elastic
2000., 0.3
**
** INTERACTION PROPERTIES
**
*Surface Interaction, name=IntProp-1
*Friction, rough
**
** BOUNDARY CONDITIONS
**
** Name: BC-3 Type: Symmetry/Antisymmetry/Encastre
*Boundary
Set-42, ENCASTRE
** Name: BC-4 Type: Symmetry/Antisymmetry/Encastre
*Boundary
Set-45, ENCASTRE
** ----------------------------------------------------------------
**
** STEP: Step-1
**
*Step, name=Step-1, nlgeom=YES
*Dynamic, Explicit
, 1.
*Bulk Viscosity
0.06, 1.2
**
** BOUNDARY CONDITIONS
**
** Name: BC-5 Type: Displacement/Rotation
*Boundary, amplitude=Amp-2
Hinge-4-3, 1, 1
Hinge-4-3, 3, 3, -5.
** Name: BC-6 Type: Displacement/Rotation
*Boundary
Hinge-1-1, 3, 3
**
** LOADS
**
** Name: Load-1   Type: Gravity
*Dload
, GRAV, 9810., 0., 0., -1.
**
** INTERACTIONS
**
** Interaction: Int-1
*Contact, op=NEW
*Contact Inclusions, ALL EXTERIOR
*Contact Property Assignment
 ,  , IntProp-1
**
** OUTPUT REQUESTS
**
*Restart, write, number interval=1, time marks=NO
**
** FIELD OUTPUT: F-Output-1
**
*Output, field, variable=PRESELECT
**
** HISTORY OUTPUT: H-Output-1
**
*Output, history, variable=PRESELECT
*End Step
** ----------------------------------------------------------------
**
** STEP: Step-2
**
*Step, name=Step-2, nlgeom=YES
*Dynamic, Explicit
, 1.
*Bulk Viscosity
0.06, 1.2
**
** BOUNDARY CONDITIONS
**
** Name: BC-3 Type: Symmetry/Antisymmetry/Encastre
*Boundary, op=NEW
Set-42, ENCASTRE
** Name: BC-4 Type: Symmetry/Antisymmetry/Encastre
*Boundary, op=NEW
Set-45, ENCASTRE
** Name: BC-5 Type: Displacement/Rotation
*Boundary, op=NEW
** Name: BC-6 Type: Displacement/Rotation
*Boundary, op=NEW
Hinge-1-1, 3, 3
**
** OUTPUT REQUESTS
**
*Restart, write, number interval=1, time marks=NO
**
** FIELD OUTPUT: F-Output-1
**
*Output, field, variable=PRESELECT
**
** HISTORY OUTPUT: H-Output-1
**
*Output, history, variable=PRESELECT
*End Step
