*Heading
** Job name: Z_Z_Triangle_1 Model name: Box_Explicit_Compressed-20_Correct_Stiff_3D
** Generated by: Abaqus/CAE 2022
*Preprint, echo=NO, model=NO, history=NO, contact=NO
**
** PARTS
**
*Part, name=Part-1
*Node
      1,         32.5,         32.5,           0.
      2,         32.5,          65.,           0.
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*Element, type=S4
 1,  1, 10, 58, 25
 2, 10, 11, 59, 58
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*Nset, nset=Set-2, generate
   1,  121,    1
*Elset, elset=Set-2, generate
   1,  100,    1
** Section: Paper_Shell
*Shell Section, elset=Set-2, material=Paper_Material
0.6, 5
*End Part
**
*Part, name=Part-2
*Node
      1,         32.5,         32.5,           0.
      2,         32.5,          65.,           0.
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*Element, type=S4R
 1,  1, 10, 58, 25
 2, 10, 11, 59, 58
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*Nset, nset=Set-2, generate
   1,  121,    1
*Elset, elset=Set-2, generate
   1,  100,    1
** Section: Paper_Shell
*Shell Section, elset=Set-2, material=Paper_Material
0.6, 5
*End Part
**
*Part, name=Part-3
*End Part
**
*Part, name=Triangle
*Node
      1,         32.5,          65.,           0.
      2,           0.,          65.,           0.
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*Element, type=S4
  1,   1,   8,  77,  33
  2,   8,   9,  78,  77
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*Nset, nset=Set-2, generate
   1,  236,    1
*Elset, elset=Set-2, generate
   1,  209,    1
** Section: Paper_Shell
*Shell Section, elset=Set-2, material=Paper_Material
0.6, 5
*End Part
**
**
** ASSEMBLY
**
*Assembly, name=Assembly
**
*Instance, name=Part-1-1, part=Part-1
400.987496054206,         400., 10.2871315483505
400.987496054206,         400., 10.2871315483505, 400.987496054206, 400.999999988425, 10.2871315483505, 10.0000000861189
*End Instance
**
*Instance, name=Part-2-1, part=Part-2
        465.,         400.,          -1.
        465.,         400.,          -1.,         465., 399.000000011575,          -1., 10.0000000861189
*End Instance
**
*Instance, name=Part-1-2, part=Part-1
400.987495743803,         400., 10.287132396917
400.987495743803,         400., 10.287132396917, 400.987495743803, 399.000000011575, 10.287132396917, 10.0000000861189
*End Instance
**
*Instance, name=Part-1-3, part=Part-1
529.012504256197,         400., 10.287132396917
529.012504256197,         400., 10.287132396917, 529.012504256197, 400.999999998098, 10.287132396917, 189.999999952031
*End Instance
**
*Instance, name=Part-3-1, part=Part-3
        -35.,        -67.5,          -1.
*Node
      1,           0.,           0.,           0.
      2,         100.,           0.,           0.
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*Element, type=R3D4
  1,   1,   2,  13,  12
  2,   2,   3,  14,  13
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*Node
    122,           0.,           0.,           0.
*Nset, nset=Part-3-1-RefPt_, internal
122,
*Elset, elset=Part-3-1, generate
   1,  100,    1
*End Instance
**
*Instance, name=Triangle-1, part=Triangle
402.947485159222, 400.987496511023, 21.4027871646108
402.947485159222, 400.987496511023, 21.4027871646108, 402.241727622265, 401.693254108542, 21.4645328987944, 14.1331494095586
*End Instance
**
*Instance, name=Triangle-2, part=Triangle
402.947485072229, 400.987496646121, -0.82852215576095
402.947485072229, 400.987496646121, -0.82852215576095, 403.653242609186, 400.281739048601, -0.766776421577394, 14.1331494095586
*End Instance
**
*Element, type=CONN3D2
1, Part-1-3.4, Part-1-2.4
*Connector Section, elset=Wire-1-Set-3, behavior=ConnSect-2
Axial,
"Datum csys-2",
*Nset, nset=Hinge-1-1, instance=Part-2-1
  3,  4,  8, 18, 19, 20, 21, 42, 43, 44, 45
*Elset, elset=Hinge-1-1, instance=Part-2-1
 21, 22, 23, 24, 25, 71, 72, 73, 74, 75
*Nset, nset=Hinge-1-2, instance=Part-1-1
  5,  6,  9, 30, 31, 32, 33, 54, 55, 56, 57
*Elset, elset=Hinge-1-2, instance=Part-1-1
  46,  47,  48,  49,  50,  96,  97,  98,  99, 100
*Nset, nset=Hinge-2-1, instance=Part-2-1
  5,  6,  9, 30, 31, 32, 33, 54, 55, 56, 57
*Elset, elset=Hinge-2-1, instance=Part-2-1
  46,  47,  48,  49,  50,  96,  97,  98,  99, 100
*Nset, nset=Hinge-2-3, instance=Part-1-3
  3,  4,  8, 18, 19, 20, 21, 42, 43, 44, 45
*Elset, elset=Hinge-2-3, instance=Part-1-3
 21, 22, 23, 24, 25, 71, 72, 73, 74, 75
*Nset, nset=Hinge-3-2, instance=Part-1-1
  3,  4,  8, 18, 19, 20, 21, 42, 43, 44, 45
*Elset, elset=Hinge-3-2, instance=Part-1-1
 21, 22, 23, 24, 25, 71, 72, 73, 74, 75
*Nset, nset=Hinge-3-4, instance=Part-1-2
  3,  4,  8, 18, 19, 20, 21, 42, 43, 44, 45
*Elset, elset=Hinge-3-4, instance=Part-1-2
 21, 22, 23, 24, 25, 71, 72, 73, 74, 75
*Nset, nset=Hinge-4-3, instance=Part-1-3
  5,  6,  9, 30, 31, 32, 33, 54, 55, 56, 57
*Elset, elset=Hinge-4-3, instance=Part-1-3
  46,  47,  48,  49,  50,  96,  97,  98,  99, 100
*Nset, nset=Hinge-4-4, instance=Part-1-2
  5,  6,  9, 30, 31, 32, 33, 54, 55, 56, 57
*Elset, elset=Hinge-4-4, instance=Part-1-2
  46,  47,  48,  49,  50,  96,  97,  98,  99, 100
*Nset, nset=Hinge_Triangle_I_1, instance=Part-1-1
  2,  3,  6, 14, 15, 16, 17, 34, 35, 36, 37
*Elset, elset=Hinge_Triangle_I_1, instance=Part-1-1
  5, 10, 15, 20, 25, 26, 31, 36, 41, 46
*Nset, nset=Hinge_Triangle_I_2, instance=Triangle-2
  1,  2,  7,  8,  9, 10
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*Elset, elset=Hinge_Triangle_I_2, instance=Triangle-2
   1,   2,   3,   4,   5,   6
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*Nset, nset=Hinge_Triangle_I_I_1, instance=Triangle-2
  2,  3,  5, 18, 19, 20, 34, 35, 36, 37, 38, 39, 40, 41, 42, 43
*Elset, elset=Hinge_Triangle_I_I_1, instance=Triangle-2
 11, 22, 33, 44, 45, 46, 47, 48, 49, 50, 51, 52, 53, 54, 55
*Nset, nset=Hinge_Triangle_I_I_2, instance=Triangle-1
  2,  3,  5, 18, 19, 20, 34, 35, 36, 37, 38, 39, 40, 41, 42, 43
*Elset, elset=Hinge_Triangle_I_I_2, instance=Triangle-1
 11, 22, 33, 44, 45, 46, 47, 48, 49, 50, 51, 52, 53, 54, 55
*Nset, nset=Hinge_Triangle_O_1, instance=Triangle-1
  1,  2,  7,  8,  9, 10
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*Elset, elset=Hinge_Triangle_O_1, instance=Triangle-1
   1,   2,   3,   4,   5,   6
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*Nset, nset=Hinge_Triangle_O_3, instance=Triangle-2
  1,  2,  7,  8,  9, 10
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*Elset, elset=Hinge_Triangle_O_3, instance=Triangle-2
   1,   2,   3,   4,   5,   6
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*Nset, nset=Node, instance=Part-1-3
 6,
*Nset, nset=Set-42, instance=Part-3-1, generate
   1,  121,    1
*Elset, elset=Set-42, instance=Part-3-1, generate
   1,  100,    1
*Nset, nset=Set-45, instance=Part-3-1
 122,
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*Elset, elset=Wire-1-Set-3
 1,
*Surface, type=NODE, name=Hinge-1-1_CNS_, internal
Hinge-1-1, 1.
*Surface, type=NODE, name=Hinge-1-2_CNS_, internal
Hinge-1-2, 1.
*Surface, type=NODE, name=Hinge-2-1_CNS_, internal
Hinge-2-1, 1.
*Surface, type=NODE, name=Hinge-2-3_CNS_, internal
Hinge-2-3, 1.
*Surface, type=NODE, name=Hinge-3-2_CNS_, internal
Hinge-3-2, 1.
*Surface, type=NODE, name=Hinge-3-4_CNS_, internal
Hinge-3-4, 1.
*Surface, type=NODE, name=Hinge-4-3_CNS_, internal
Hinge-4-3, 1.
*Surface, type=NODE, name=Hinge-4-4_CNS_, internal
Hinge-4-4, 1.
*Surface, type=NODE, name=Hinge_Triangle_O_1_CNS_, internal
Hinge_Triangle_O_1, 1.
*Surface, type=NODE, name=Hinge_Triangle_I_1_CNS_, internal
Hinge_Triangle_I_1, 1.
*Surface, type=NODE, name=Hinge_Triangle_O_3_CNS_, internal
Hinge_Triangle_O_3, 1.
*Surface, type=NODE, name=Hinge_Triangle_I_2_CNS_, internal
Hinge_Triangle_I_2, 1.
*Surface, type=NODE, name=Hinge_Triangle_I_I_1_CNS_, internal
Hinge_Triangle_I_I_1, 1.
*Surface, type=NODE, name=Hinge_Triangle_I_I_2_CNS_, internal
Hinge_Triangle_I_I_2, 1.
*Rigid Body, ref node=Part-3-1.Part-3-1-RefPt_, elset=Part-3-1.Part-3-1
*Orientation, name="Datum csys-2"
         -1.,           0.,           0.,           0.,           1.,           0.
1, 0.
** Constraint: Hinge1
*Tie, name=Hinge1, adjust=yes, no rotation
Hinge-1-2_CNS_, Hinge-1-1_CNS_
** Constraint: Hinge2
*Tie, name=Hinge2, adjust=yes, no rotation
Hinge-2-3_CNS_, Hinge-2-1_CNS_
** Constraint: Hinge3
*Tie, name=Hinge3, adjust=yes, no rotation
Hinge-3-4_CNS_, Hinge-3-2_CNS_
** Constraint: Hinge4
*Tie, name=Hinge4, adjust=yes, no rotation
Hinge-4-4_CNS_, Hinge-4-3_CNS_
** Constraint: Hinge5_T
*Tie, name=Hinge5_T, adjust=yes, no rotation
Hinge_Triangle_I_1_CNS_, Hinge_Triangle_O_1_CNS_
** Constraint: Hinge_6_T
*Tie, name=Hinge_6_T, adjust=yes, no rotation
Hinge_Triangle_I_2_CNS_, Hinge_Triangle_O_3_CNS_
** Constraint: Hinge_7_T_I_I
*Tie, name=Hinge_7_T_I_I, adjust=yes, no rotation
Hinge_Triangle_I_I_2_CNS_, Hinge_Triangle_I_I_1_CNS_
*End Assembly
*Connector Behavior, name=ConnSect-2
*Connector Constitutive Reference
90., , , , ,
*Connector Elasticity, component=1
 0.0077,
*Amplitude, name=Amp-1, definition=SMOOTH STEP
             0.,              0.,              1.,              1.
*Amplitude, name=Amp-2, definition=EQUALLY SPACED, fixed interval=1.
             0.,              1.
**
** MATERIALS
**
*Material, name=Paper_Material
*Density
 2e-10,
*Elastic
2400., 0.3
**
** INTERACTION PROPERTIES
**
*Surface Interaction, name=IntProp-1
*Friction, rough
**
** BOUNDARY CONDITIONS
**
** Name: BC-3 Type: Symmetry/Antisymmetry/Encastre
*Boundary
Set-42, ENCASTRE
** Name: BC-4 Type: Symmetry/Antisymmetry/Encastre
*Boundary
Set-45, ENCASTRE
** ----------------------------------------------------------------
**
** STEP: Step-1
**
*Step, name=Step-1, nlgeom=YES
*Dynamic, Explicit
, 2.5
*Bulk Viscosity
0.06, 1.2
**
** LOADS
**
** Name: Load-1   Type: Gravity
*Dload
, GRAV, 9810., 0., 0., -1.
**
** INTERACTIONS
**
** Interaction: Int-1
*Contact, op=NEW
*Contact Inclusions, ALL EXTERIOR
*Contact Property Assignment
 ,  , IntProp-1
**
** OUTPUT REQUESTS
**
*Restart, write, number interval=1, time marks=NO
**
** FIELD OUTPUT: F-Output-1
**
*Output, field, variable=PRESELECT, number interval=50
**
** HISTORY OUTPUT: H-Output-1
**
*Output, history, variable=PRESELECT
**
** HISTORY OUTPUT: U1_Node
**
*Output, history, time interval=0.00625
*Node Output, nset=Node
A3, AT, U3
*End Step
